# OpenSim document version 40000
MarkerSet:
  Marker Neck: torso (0.003155 0.3715 0)
  Marker RShoulder: torso (0.003155 0.3715 0.17)
  Marker LShoulder: torso (0.003155 0.3715 -0.17)
  Marker RHip: pelvis (-0.020276 -0.07849 0.09476)
  Marker LHip: pelvis (-0.020276 -0.07849 -0.09476)
  Marker midHip: pelvis (-0.020276 -0.07849 0)
  Marker RKnee: tibia_r (-0.00808954 -0.0035348 -0.00148474)
  Marker LKnee: tibia_l (-0.00808954 -0.0035348 0.00148474)
  Marker RAnkle: tibia_r (-0.014 -0.38 0.0075)
  Marker LAnkle: tibia_l (-0.014 -0.38 -0.0075)
  Marker RHeel: calcn_r (0.01820599 0.01 -0.02024674)
  Marker LHeel: calcn_l (0.01820599 0.01 0.02024674)
  Marker RSmallToe: calcn_r (0.200266 3.68629e-17 0.0404935)
  Marker LSmallToe: calcn_l (0.200266 3.68629e-17 -0.0404935)
  Marker RBigToe: calcn_r (0.227575 3.59955e-17 -0.0151851)
  Marker LBigToe: calcn_l (0.227575 3.59955e-17 0.0151851)
  Marker RElbow: humerus_r (0.013144 -0.286273 -0.009595)
  Marker LElbow: humerus_l (0.013144 -0.286273 0.009595)
  Marker RWrist: hand_r (0 0 0)
  Marker LWrist: hand_l (0 0 0)
